w := 17100
L1 := 100*10^-6
Z1 := 3
Z2 := 1i*L1*w
I := 5/(Z1 + Z2)
Uz1 := Z1*I
Uz2 := I*Z2
Uz1 = 3.77387 - 2.15111i
Uz2 = 1.22613 + 2.15111i
M1 := |Uz1|
M2 := |Uz2|  # Модуль
N1 := Uz1/M1
N2 := Uz2/M2
N1 = 0.868777 - 0.495203i
N2 = 0.495203 + 0.868777i
Cos := Re(N1)*Re(N2) + Im(N1)*Im(N2)
Cos = 5.55112e-17
A := [129, 102; 6, 73]
A^-1 = [0.00829074, -0.0115843; -0.000681431, 0.0146508]
